// COMSOL Multiphysics 5.5.0.306 model "solid-hyperelastic_with_cap.mph"
// Outline of the model tree

Parameters
  dz = 0  // z-direction displacement of the external object
  ix = 0  // indenter x0
  iy = 0  // indenter y0

Variables
  var1 "Variables 1"
    p0 = 0.1[MPa]  // Initial fluid pressure
    A0 = 1[mm^2]
    EnclosedArea = AreaInt(-x*solid.nx)
    int_p = p0  // fluid pressure

Selections
  sel1: Explicit "core_domain" on domains 2, 3
  sel2: Explicit "fluid_domain" on domains 2, 3
  sel3: Explicit "skin_domain" on domains 1
  sel4: Explicit "core_boundary" on boundaries 9-13, 19, 22, 23, 25, 26
  sel5: Explicit "sensor inside" on boundaries 3-7, 9-12, 19, 21-23, 25-27

Couplings
  intop1: Integration on selection geom1_sel2 | opname = AreaInt

Probes
  pbnd13: BoundaryPoint "BP 13" | dom = boundaries 19; coords = {6.56797211151, 0, -6.40186658752}
    ppb13: PointExpr "P" | expr = p; unit = Pa; descr = Pressure
  pbnd14: BoundaryPoint "BP 14" | dom = boundaries 19; coords = {4.31820400415, -1.85, -6.96279665309}
    ppb14: PointExpr "P" | expr = p; unit = Pa; descr = Pressure
  pbnd15: BoundaryPoint "BP 15" | dom = boundaries 19; coords = {4.31820400415, 1.85, -6.96279665309}
    ppb15: PointExpr "P" | expr = p; unit = Pa; descr = Pressure
  pbnd16: BoundaryPoint "BP 16" | dom = boundaries 19; coords = {1.90841070596, 0, -7.56362569397}
    ppb16: PointExpr "P" | expr = p; unit = Pa; descr = Pressure
  pbnd1: BoundaryPoint "BP 1" | dom = boundaries 23; coords = {9.86509533308, -4.03714509549, -2.80539667022}
    ppb1: PointExpr "P" | expr = p; unit = Pa; descr = Pressure
  pbnd2: BoundaryPoint "BP 2" | dom = boundaries 23; coords = {8.13053238884, -3.1038130299, -5.25812509994}
    ppb2: PointExpr "P" | expr = p; unit = Pa; descr = Pressure
  pbnd3: BoundaryPoint "BP 3" | dom = boundaries 23; coords = {6.1318484939, -5.55983069659, -4.33452767919}
    ppb3: PointExpr "P" | expr = p; unit = Pa; descr = Pressure
  pbnd4: BoundaryPoint "BP 4" | dom = boundaries 23; coords = {2.14453773489, -5.1926258383, -6.0898070335}
    ppb4: PointExpr "P" | expr = p; unit = Pa; descr = Pressure
  pbnd5: BoundaryPoint "BP 5" | dom = boundaries 23; coords = {2.22939240423, -7.26479447504, -3.32067636229}
    ppb5: PointExpr "P" | expr = p; unit = Pa; descr = Pressure
  pbnd6: BoundaryPoint "BP 6" | dom = boundaries 10; coords = {-0.39974981781, -2.46287208557, -7.75391198277}
    ppb6: PointExpr "P" | expr = p; unit = Pa; descr = Pressure
  pbnd7: BoundaryPoint "BP 7" | dom = boundaries 10; coords = {-2.3453628542, -7.34473056167, -3.1024441746}
    ppb7: PointExpr "P" | expr = p; unit = Pa; descr = Pressure
  pbnd8: BoundaryPoint "BP 8" | dom = boundaries 10; coords = {-3.49110507141, -4.81102255113, -6.12258517401}
    ppb8: PointExpr "P" | expr = p; unit = Pa; descr = Pressure
  pbnd9: BoundaryPoint "BP 9" | dom = boundaries 10; coords = {-5.70866341837, -1.84179356654, -6.95621762789}
    ppb9: PointExpr "P" | expr = p; unit = Pa; descr = Pressure
  pbnd10: BoundaryPoint "BP 10" | dom = boundaries 10; coords = {-6.22284322143, -5.84580789333, -3.88108135866}
    ppb10: PointExpr "P" | expr = p; unit = Pa; descr = Pressure
  pbnd11: BoundaryPoint "BP 11" | dom = boundaries 10; coords = {-8.19811420114, -3.29069183999, -5.14713182723}
    ppb11: PointExpr "P" | expr = p; unit = Pa; descr = Pressure
  pbnd12: BoundaryPoint "BP 12" | dom = boundaries 10; coords = {-10.1618295606, -3.90022035692, -2.58202072176}
    ppb12: PointExpr "P" | expr = p; unit = Pa; descr = Pressure

Pairs
  p1: Contact "Contact Pair 1" | destination: selection geom1_sel1

Common definitions
  pres1: PrescribedDeformation on boundaries 17 | prescribedDeformation = {0, 0, dz*1[mm]}

Geometry
  geom1 "Geometry 1" (3D, length unit mm)
    elp1: Ellipsoid "outer" | semiaxes = {14.23, 9.94, 9.94}
    blk1: Block | pos = {-20, -11, 0}; size = {40, 22, 11}
    dif1: Difference "outside" | input = elp1; input2 = blk1
    elp2: Ellipsoid "inner" | semiaxes = {14.03, 9.74, 9.74}
    blk2: Block | pos = {-20, -11, 0}; size = {40, 22, 11}
    dif2: Difference "inside" | input = elp2; input2 = blk2
    dif3: Difference "skin" | input = dif1; input2 = dif2; keep = on
    del1: Delete "Delete Entities 1" | input = dif1
    elp3: Ellipsoid | semiaxes = {12.437, 8.153, 8.153}
    blk3: Block | pos = {-13, -9, 0}; size = {26, 18, 9}
    dif4: Difference | input = elp3; input2 = blk3
    wp1: WorkPlane
      planetype = transformed
      transdispl = {-.4033, 0, -8.14}
      transaxistype = y
      transrot = -14
      unite = on
    blk4: Block | workplane = wp1; pos = {-3, -9, -1}; size = {16, 18, 1}
    dif5: Difference "core" | input = dif4; input2 = blk4
    copy2: Copy "core2" | input = dif5; keep = on; displx = 0; disply = 0; displz = 0
    dif6: Difference "fluid" | input = dif2; input2 = copy2
    copy3: Copy | input = dif6; keep = on; displx = 0; disply = 0
    rot1: Rotate | input = copy3; axistype = x; rot = 180
    blk6: Block | pos = {-20, -11, .5}; size = {40, 22, 11}
    dif7: Difference "cap" | input = rot1; input2 = blk6
    sel1: ExplicitSelection "skin boundary" | selection = dif3(1) boundaries 1, 3, 6, 8; groupcontang = on
    sel2: ExplicitSelection "fluid boundary" | selection = dif6(1) boundaries 1-10; groupcontang = on; angletol = 90
    blk5: Block "indenter" | pos = {-5, -5, -9.94-1}; type = surface; size = {10, 10, 1}
    fin: Finalize "Form Union"
    mce1: MeshControlEdges | input = fin(1) edges 2, 26, 37, 38

Materials
  mat1: Common "Silicon" on selection sel3
    def "Basic"
      relpermeability = 1
      electricconductivity = 1e-12[S/m]
      thermalexpansioncoefficient = 2.6e-6[1/K]
      heatcapacity = 700[J/(kg*K)]
      relpermittivity = 11.7
      density = 2329[kg/m^3]
      thermalconductivity = 130[W/(m*K)]
    Enu "Young's modulus and Poisson's ratio"
      youngsmodulus = 170e9[Pa]
      poissonsratio = 0.28
    RefractiveIndex
      n = 3.48
      ki = 0
    MooneyRivlin
      C10 = 0.37[Mpa]
      C01 = .11[Mpa]
  mat2: Common "PEG-200" on selection sel2
    def "Basic"
      dynamicviscosity = .0638
      density = 1125

Physics
  solid: SolidMechanics on selection sel3
    dependent variable u_solid = {u_solid, v_solid, w_solid}
    ShapeProperty.order_displacement = 2
    lemm1: LinearElasticModel "Linear Elastic Material 1" (default)
    free1: Free (default)
    init1: init "Initial Values 1" (default)
    fix1: Fixed "Fixed Constraint 1" on boundaries 2
    hmm1: HyperelasticModel "Hyperelastic Material 1" on selection sel3
      MaterialModel = MooneyRivlin
      kappa = 1e4[Mpa]
      C01_mat = from_mat
    cnt1: SolidContact "Contact 1" on all boundaries | sourceMesh = 1; pairs = p1
      free1: Free (default)
      fric1: Friction on all boundaries | mu_fric = 0.3
    bndl1: BoundaryLoad on selection geom1_sel2 | LoadType = FollowerPressure; FollowerPressure = int_p

Mesh
  mesh1 "Mesh 1"
    size1: Size on entire geometry

Studies
  std1 "Study 1"
    stat: Stationary