// COMSOL Multiphysics 5.5.0.359 model "solid_so_motion.mph"
// Outline of the model tree

Parameters
  para = 0  // para displacement

Selections
  sel1: Explicit "core_domain" on no domains
  sel2: Explicit "fluid_domain" on no domains
  sel3: Explicit "skin_domain" on domains 1
  sel4: Explicit "core_boundary" on boundaries 10-12, 14, 16

Probes
  pbnd13: BoundaryPoint "BP 13" | coords = {6.56797211151, 0, -6.40186658752}
    ppb13: PointExpr "P" | expr = p; unit = Pa; descr = Pressure; table = tbl1
  pbnd14: BoundaryPoint "BP 14" | coords = {4.31820400415, -1.85, -6.96279665309}
    ppb14: PointExpr "P" | expr = p; unit = Pa; descr = Pressure; table = tbl1
  pbnd15: BoundaryPoint "BP 15" | coords = {4.31820400415, 1.85, -6.96279665309}
    ppb15: PointExpr "P" | expr = p; unit = Pa; descr = Pressure; table = tbl1
  pbnd16: BoundaryPoint "BP 16" | coords = {1.90841070596, 0, -7.56362569397}
    ppb16: PointExpr "P" | expr = p; unit = Pa; descr = Pressure; table = tbl1
  pbnd1: BoundaryPoint "BP 1" | coords = {9.86509533308, -4.03714509549, -2.80539667022}
    ppb1: PointExpr "P" | expr = p; unit = Pa; descr = Pressure; table = tbl1
  pbnd2: BoundaryPoint "BP 2" | coords = {8.13053238884, -3.1038130299, -5.25812509994}
    ppb2: PointExpr "P" | expr = p; unit = Pa; descr = Pressure; table = tbl1
  pbnd3: BoundaryPoint "BP 3" | coords = {6.1318484939, -5.55983069659, -4.33452767919}
    ppb3: PointExpr "P" | expr = p; unit = Pa; descr = Pressure; table = tbl1
  pbnd4: BoundaryPoint "BP 4" | coords = {2.14453773489, -5.1926258383, -6.0898070335}
    ppb4: PointExpr "P" | expr = p; unit = Pa; descr = Pressure; table = tbl1
  pbnd5: BoundaryPoint "BP 5" | coords = {2.22939240423, -7.26479447504, -3.32067636229}
    ppb5: PointExpr "P" | expr = p; unit = Pa; descr = Pressure; table = tbl1
  pbnd6: BoundaryPoint "BP 6" | coords = {-0.39974981781, -2.46287208557, -7.75391198277}
    ppb6: PointExpr "P" | expr = p; unit = Pa; descr = Pressure; table = tbl1
  pbnd7: BoundaryPoint "BP 7" | coords = {-2.3453628542, -7.34473056167, -3.1024441746}
    ppb7: PointExpr "P" | expr = p; unit = Pa; descr = Pressure; table = tbl1
  pbnd8: BoundaryPoint "BP 8" | coords = {-3.49110507141, -4.81102255113, -6.12258517401}
    ppb8: PointExpr "P" | expr = p; unit = Pa; descr = Pressure; table = tbl1
  pbnd9: BoundaryPoint "BP 9" | coords = {-5.70866341837, -1.84179356654, -6.95621762789}
    ppb9: PointExpr "P" | expr = p; unit = Pa; descr = Pressure; table = tbl1
  pbnd10: BoundaryPoint "BP 10" | coords = {-6.22284322143, -5.84580789333, -3.88108135866}
    ppb10: PointExpr "P" | expr = p; unit = Pa; descr = Pressure; table = tbl1
  pbnd11: BoundaryPoint "BP 11" | coords = {-8.19811420114, -3.29069183999, -5.14713182723}
    ppb11: PointExpr "P" | expr = p; unit = Pa; descr = Pressure; table = tbl1
  pbnd12: BoundaryPoint "BP 12" | coords = {-10.1618295606, -3.90022035692, -2.58202072176}
    ppb12: PointExpr "P" | expr = p; unit = Pa; descr = Pressure; table = tbl1

Pairs
  p1: Contact "Contact Pair 1" | source: boundaries 17; destination: boundaries 1
  ap2: Identity "Identity Boundary Pair 2" | source: boundaries 3-6; destination: boundaries 7, 9, 13, 15

Common definitions
  free1: DeformingDomain on no domains
  pres1: PrescribedDeformation on boundaries 17 | prescribedDeformation = {0, 0, 1*para [mm]}

Geometry
  geom1 "Geometry 1" (3D, length unit mm)
    elp1: Ellipsoid "outer" | semiaxes = {14.23, 9.94, 9.94}
    blk1: Block | pos = {-20, -11, 0}; size = {40, 22, 11}
    dif1: Difference "outside" | input = elp1; input2 = blk1
    elp2: Ellipsoid "inner" | semiaxes = {14.024, 9.74, 9.74}
    blk2: Block | pos = {-20, -11, 0}; size = {40, 22, 11}
    dif2: Difference "inside" | input = elp2; input2 = blk2
    dif3: Difference "skin" | input = dif1; input2 = dif2; keep = on
    del1: Delete "Delete Entities 1" | input = dif1
    elp3: Ellipsoid "Ellipsoid core" | semiaxes = {12.437, 8.153, 8.153}
    blk3: Block | pos = {-13, -9, 0}; size = {26, 18, 9}
    dif4: Difference | input = elp3; input2 = blk3
    wp1: WorkPlane
      planetype = transformed
      transdispl = {-.4033, 0, -8.14}
      transaxistype = y
      transrot = -14
      unite = on
    blk4: Block | workplane = wp1; pos = {-3, -9, -1}; size = {16, 18, 1}
    dif5: Difference "core" | input = dif4; input2 = blk4
    dif6: Difference "fluid" | input = dif2; input2 = dif5
    pt1: Point (disabled) | p = {0, 0, -9.93}
    ps1: ParametricSurface "indenter"
      pos = {0, 0, -9.93}
      parmin1 = -10
      parmax1 = 10
      parmin2 = -5
      parmax2 = 5
      coord = {s1, s2, 0}
    fin: Finalize "Form Assembly" | action = assembly
    mce1: MeshControlEdges | input = fin(1) edges 2, 7, 11, 12

Materials
  mat1: Common "Silicone Rubber" on selection sel3
    def "Basic"
      relpermeability = 1
      electricconductivity = 1e-12[S/m]
      thermalexpansioncoefficient = 2.6e-6[1/K]
      heatcapacity = 700[J/(kg*K)]
      relpermittivity = 11.7
      density = 1700[kg/m^3]
      thermalconductivity = 130[W/(m*K)]
    Enu "Young's modulus and Poisson's ratio"
      youngsmodulus = 170e9[Pa]
      poissonsratio = 0.48
    RefractiveIndex
      n = 3.48
      ki = 0
  mat2: Common "PEG-200" on domains 2
    def "Basic"
      dynamicviscosity = .0638
      density = 1125

Physics
  spf: LaminarFlow on domains 1
    dependent variable u_fluid = {u_fluid, v_fluid, w_fluid}
    PhysicalModelProperty.Compressibility = Incompressible
    PhysicalModelProperty.pref = 20
    AdvancedSettingProperty.UsePseudoTime = 1
    fp1: FluidProperties (default)
    init1: init "Initial Values 1" (default) | p_init = 1
    wallbc1: WallBC "Wall 1" (default)
    wallbc2: WallBC "Wall 2" on boundaries 10-12, 14, 16 | TranslationalVelocityOption = ZeroFixedWall
  solid: SolidMechanics on domains 1
    dependent variable u_solid = {u_solid, v_solid, w_solid}
    ShapeProperty.order_displacement = 2
    lemm1: LinearElasticModel "Linear Elastic Material 1" (default)
    free1: Free (default)
    init1: init "Initial Values 1" (default)
    hmm1: HyperelasticModel "Hyperelastic Material 1" on selection sel3
      MaterialModel = MooneyRivlin
      C10_mat = userdef
      C10 = 1.5[MPa]
      C01_mat = userdef
      C01 = 0.4[MPa]
    fix1: Fixed "Fixed Constraint 1" on boundaries 2
    cnt1: SolidContact "Contact 1" on all boundaries | sourceMesh = 1; pairs = p1
      free1: Free (default)

Multiphysics
  fsi1: FluidStructureInteractionBC "Fluid-Structure Interaction 1" on all boundaries
    Fluid_physics = spf
    Structure_physics = solid

Mesh
  mesh1 "Mesh 1" (physics-controlled)
    size: MeshSizeDefault | hauto = 6

Studies
  std1 "Study 1"
    stat: Stationary | useparam = on; pname = para; plistarr = range(0.1,0.1,0.2)

Solver configurations
  sol1 "Solution 1" (study std1)
    v1: Variables "Dependent Variables 1"
      comp1_solid_pw: Field "Auxiliary pressure (comp1.solid.pw)" | scalemethod = manual; scaleval = 100000000
      comp1_spatial_disp: Field "Spatial mesh displacement (comp1.spatial.disp)"
        scalemethod = manual
        scaleval = 0.000361107961696
      comp1_u_solid: Field "Displacement field (comp1.u_solid)" | scalemethod = manual; scaleval = 1e-2*0.0361107961696
    s1: Stationary "Stationary Solver 1"
      p1: Parametric | porder = constant
      se1: Segregated | maxsegiter = 200; segstabacc = segcflcmp
        ss1: SegregatedStep "Velocity u_fluid, Pressure p"
          segvar = {comp1_u_fluid, comp1_p}
          linsolver = d1
          subdamp = 0.8
        ss2: SegregatedStep "Displacement field" | segvar = {comp1_u_solid, comp1_solid_pw}; linsolver = d2; subdamp = 0.8
        ss3: SegregatedStep "Spatial mesh displacement"
          segvar = {comp1_spatial_disp}
          linsolver = d3
          subdamp = 0.8
          subntolfact = 0.1
      d1: Direct "Direct, fluid flow variables (spf)" | linsolver = pardiso; pivotperturb = 1.0E-13
      d2: Direct "Suggested Direct Solver (solid)"
      d3: Direct "Suggested Direct Solver (mesh)" | linsolver = pardiso; pivotperturb = 1.0E-13

Datasets
  dset1: Solution | solution = sol1
  dset2: Solution "Probe Solution 2"
  cpt1: CutPoint3D "BP 13" | data = dset2; pointx = 6.56797211151; pointy = 0.0; pointz = -6.40186658752
  cpt2: CutPoint3D "BP 14" | data = dset2; pointx = 4.31820400415; pointy = -1.85; pointz = -6.96279665309
  cpt3: CutPoint3D "BP 15" | data = dset2; pointx = 4.31820400415; pointy = 1.85; pointz = -6.96279665309
  cpt4: CutPoint3D "BP 16" | data = dset2; pointx = 1.90841070596; pointy = 0.0; pointz = -7.56362569397
  cpt5: CutPoint3D "BP 1" | data = dset2; pointx = 9.86509533308; pointy = -4.03714509549; pointz = -2.80539667022
  cpt6: CutPoint3D "BP 2" | data = dset2; pointx = 8.13053238884; pointy = -3.1038130299; pointz = -5.25812509994
  cpt7: CutPoint3D "BP 3" | data = dset2; pointx = 6.1318484939; pointy = -5.55983069659; pointz = -4.33452767919
  cpt8: CutPoint3D "BP 4" | data = dset2; pointx = 2.14453773489; pointy = -5.1926258383; pointz = -6.0898070335
  cpt9: CutPoint3D "BP 5" | data = dset2; pointx = 2.22939240423; pointy = -7.26479447504; pointz = -3.32067636229
  cpt10: CutPoint3D "BP 6" | data = dset2; pointx = -0.39974981781; pointy = -2.46287208557; pointz = -7.75391198277
  cpt11: CutPoint3D "BP 7" | data = dset2; pointx = -2.3453628542; pointy = -7.34473056167; pointz = -3.1024441746
  cpt12: CutPoint3D "BP 8" | data = dset2; pointx = -3.49110507141; pointy = -4.81102255113; pointz = -6.12258517401
  cpt13: CutPoint3D "BP 9" | data = dset2; pointx = -5.70866341837; pointy = -1.84179356654; pointz = -6.95621762789
  cpt14: CutPoint3D "BP 10" | data = dset2; pointx = -6.22284322143; pointy = -5.84580789333; pointz = -3.88108135866
  cpt15: CutPoint3D "BP 11" | data = dset2; pointx = -8.19811420114; pointy = -3.29069183999; pointz = -5.14713182723
  cpt16: CutPoint3D "BP 12" | data = dset2; pointx = -10.1618295606; pointy = -3.90022035692; pointz = -2.58202072176

Evaluation groups
  eg1: EvaluationGroup | data = dset1

Plots
  pg5: PlotGroup1D "Probe Plot Group 5" | data = none
    tblp1: Table "Probe Table Graph 1" | table = tbl1
  pg6: PlotGroup3D "pressure" | data = dset1
    iso1: Isosurface | expr = p
  pg7: PlotGroup3D "stress" | data = dset1
    surf1: Surface | expr = solid.mises
      def1: Deform "Deformation 1" | expr = {u_solid, v_solid, w_solid}
  pg8: PlotGroup3D "core pressure" | data = dset1
    surf1: Surface | data = dset1; expr = p
      sel1: Selection on boundaries 10-12, 14, 16