// COMSOL Multiphysics 5.5.0.264 model "contacting_rings.mph"
// Friction Between Contacting Rings
// modeldescr_sme/contacting_rings
// This is a benchmark problem involving stick-slip friction of a ring rolling inside another ring. The displacement of the inner ring is computed and compared to the analytical result.
// Outline of the model tree

Parameters
  r1 = 160[mm]  // Outer ring radius
  r2 = 111.5[mm]  // Inner ring radius
  t1 = 4[mm]  // Outer ring thickness
  t2 = 11.5[mm]  // Inner ring thickness
  y0 = 111.5[mm]-156[mm]  // Inner ring center initial y-position
  phi = 0[rad]  // Inner ring rotation angle

Variables
  var1 "Variables 1" on boundaries 1
    L = (r1-t1)*(atan2(-y,-x)-pi/2)  // Length of the outer ring

Pairs
  p1: Contact "Contact Pair 1" | source: boundaries 1; destination: boundaries 4

Geometry
  geom1 "Geometry 1" (2D, length unit m)
    c1: Circle | rot = -95; type = curve; r = r1-t1; angle = 90
    c2: Circle | pos = {0, y0}; rot = -95; layername = Layer 1; layer = t2; r = r2; angle = 90
    del1: Delete "Delete Entities 1" | input = c2(1) domains 1
    del2: Delete "Delete Entities 2" | input = c1(1) boundaries 2, 3
    fin: Finalize "Form Assembly" | action = assembly

Materials
  mat1: Common "Material 1" on all domains
    def "Basic"
      youngsmodulus = 210[GPa]
      poissonsratio = 0.3
      density = 7850

Physics
  solid: SolidMechanics on all domains
    dependent variable u = {u, v, w}
    lemm1: LinearElasticModel "Linear Elastic Material 1" (default)
    free1: Free (default)
    init1: init "Initial Values 1" (default)
    cnt1: SolidContact "Contact 1" on all boundaries | ContactMethodCtrl = AugmentedLagrange; sourceMesh = 1; pairs = p1
      free1: Free (default)
      fric1: Friction on all boundaries | mu_fric = 1; sliptotStore = 1
    rig1: RigidConnector on boundaries 5
      RotationType = PrescribedRotationGroup
      phi0 = -phi
      CenterOfRotationType = userDefined
      xc = {0, y0, 0}
      rf1: RigidBodyForce "Applied Force 1" | Ft = {0, -500, 0}
      spf1: SpringFoundation | ku = 1e6*(phi==0); kths = 1e6*(phi==0)

Mesh
  mesh1 "Mesh 1"
    size: MeshSizeDefault | hmax = 0.0113; hmin = 5.07E-5; hcurve = 0.3; hgrad = 1.3
    map1: Map "Mapped 1" on remaining entities
      dis1: Distribution on boundaries 2 | numelem = 3
      dis2: Distribution on boundaries 4 | numelem = 60
    edg1: Edge on boundaries 1
      dis1: Distribution on boundaries 1 | numelem = 100

Studies
  std1 "Study 1"
    stat: Stationary | useparam = on; pname = phi; plistarr = range(0,pi/120,pi/6); punit = rad

Solver configurations
  sol1 "Solution 1" (study std1)
    v1: Variables "Dependent Variables 1"
      comp1_solid_Tn_p1: Field "Contact pressure (comp1.solid.Tn_p1)" | scalemethod = manual; scaleval = 1e5
      comp1_solid_Tt_p1: Field "Friction force (spatial frame) (comp1.solid.Tt_p1)" | scalemethod = manual; scaleval = 1e5
      comp1_u: Field "Displacement field (comp1.u)" | scalemethod = manual; scaleval = 1e-2*0.220877906249
      comp1_solid_uv_rig1: State "comp1.solid.uv_rig1" | scalemethod = manual; scaleval = 1e-2*0.220877906249
      comp1_solid_phi_rig1: State "comp1.solid.phi_rig1" | scalemethod = manual; scaleval = 1e-2
    s1: Stationary "Stationary Solver 1"
      dDef: Direct
      p1: Parametric | paramtuning = on; pinitstep = pi/1000; pminstep = pi/10000; pmaxstep = pi/1000; porder = constant
      se1: Segregated | maxsegiter = 15
        ss1: SegregatedStep "Solid Mechanics"
          segvar = {comp1_u, comp1_solid_uv_rig1, comp1_solid_phi_rig1}
          linsolver = dDef
          subdtech = ddog
          subiter = 15
          subtermauto = itertol
          subntolfact = 1
        ls1: LumpedStep | segvar = {comp1_solid_Tn_p1, comp1_solid_Tt_p1}

Datasets
  dset1: Solution | solution = sol1
  edg1: Edge2D on boundaries 4 | data = dset1
  par1: Parametric1D "Parametric Extrusion 1D 1" | data = edg1

Plots
  pg1: PlotGroup2D "Stress (solid)" | data = dset1
    surf1: Surface | expr = solid.mises
      def: Deform "Deformation" | expr = {u, v}; descr = Displacement field
    pttraj1: PointTrajectories
      expr = {solid.u_rig1, y0+solid.v_rig1}
      pointtype = arrow
      arrowexpr = {cos(phi+5[deg]), sin(-phi-5[deg])}
  pg2: PlotGroup2D "Global Loads (solid)" | data = dset1; typeintitle = off; descriptionintitle = off; unitintitle = off
    pttraj1: PointTrajectories "Applied Force 1 (Rigid Connector 1)"
      plotdata = global
      expr = {solid.rig1.rf1.loadposx, solid.rig1.rf1.loadposy}
      linetype = none
      pointtype = arrow
      arrowexpr = {solid.rig1.rf1.Fx, solid.rig1.rf1.Fy}
      col: Color "Color Expression" | expr = comp1.solid.rig1.rf1.F_Mag
    surf1: Surface "Gray Surfaces" (disabled) | expr = 1
      def: Deform "Deformation" | expr = {u, v}; descr = Displacement field
  pg3: PlotGroup2D "Contact (solid)" | data = dset1; typeintitle = off; descriptionintitle = off; unitintitle = off
    arwl1: ArrowLine "Contact 1, Pressure" | expr = {solid.cnt1.Tnx, solid.cnt1.Tny}
      col: Color "Color Expression" | expr = comp1.solid.cnt1.Tn
      def: Deform "Deformation" | expr = {u, v}; descr = Displacement field
    arwl2: ArrowLine "Contact 1, Friction force" | expr = {solid.cnt1.Ttx, solid.cnt1.Tty}
      col: Color "Color Expression" | expr = comp1.solid.cnt1.Ttnorm
      def: Deform "Deformation" | expr = {u, v}; descr = Displacement field
    surf1: Surface "Gray Surfaces" (disabled) | expr = 1
      def: Deform "Deformation" | expr = {u, v}; descr = Displacement field
  pg4: PlotGroup1D "Rigid body y-displacement" | data = dset1
    glob1: Global | expr = solid.rig1.v; unit = m; descr = Rigid body displacement, y component
  pg5: PlotGroup1D "Contact pressure along outer ring" | data = dset1
    lngr1: LineGraph on boundaries 1 | expr = dst2src_p1(solid.Tn_p1); xdata = expr; xdataexpr = L
  pg6: PlotGroup2D "2D Plot Group 6" | data = par1
    surf1: Surface | expr = solid.sliptot; descr = Accumulated slip
      hght1: Height "Height Expression 1" | expr = solid.disp